# geg.: U_B := 12V, U_D := 0.6V, U_BE := 0.7V, I_Bias := 0.005A, I_D := 0.001A
# Bias Current:
R_LED := (U_B - 2*U_D)/I_D = 10800  # Ohm
R_LED := 10000  # Ohm
R_E := (2*U_D - U_BE)/I_Bias = 100  # Ohm
R_E := 100  # Ohm
R_C := 330  # Ohm  # --> simulated!
