# 1.) Define cut off frequencies:
f_C := 14500000  # for 20m Band (14MHz to 14.35MHz)
# 2.) Define impedances:
X_C1 := 50  # Ohm
X_C3 := X_C1 = 50  # Ohm
X_C2 := X_C1/2 = 25  # Ohm
X_L1 := 50  # Ohm
X_L2 := X_L1 = 50  # Ohm
# 3.) Calculate indcutor value:
L_1 := X_L1/(2*π*f_C) = 5.4881e-7  # H = 549nH
L_2 := X_L2/(2*π*f_C) = 5.4881e-7  # H = 549nH
# 4.) Define inductor core and turns (L == L_1 == L_2):
L_1 := 580*10^-9  # H = 580nH -->12T @ T50-6 Core --> "toroids.info/T50-6.php"
L_2 := 580*10^-9  # H = 580nH -->12T @ T50-6 Core --> "toroids.info/T50-6.php"
# --> 580nH is chosen after simulation and tests: 12T @ T50-6 Core
# 5.) Calculate capacitor values:
C_1 := 1/(2*π*f_C*X_C1) = 2.19524e-10
# F = 220pF
C_3 := C_1 = 2.19524e-10  # F = 220pF
C_2 := 1/(2*π*f_C*X_C2) = 4.39048e-10  # F = 439pF --> 220pF // 220pF = 440pF
# These calculated values are only guidelines!
# After simulation and real measurements, I often followed the filter design by W6JL.
# The final values are written in the eagle circuit diagram.
#
# You can also simulate some filters in "ELSIE". 5 Order Butterworth Filter with 50R Input Impedance and Capacity input!
